<?xml version="1.0"?>
<!--
  File:     RR_Merlin_24.xml
  Author:   Aero-Matic v 0.83

  Inputs:
    name:           RR_Merlin_24
    type:           piston
    power:          1620 hp
    augmented?      no
    injected?       yes
-->

<piston_engine name="RR_Merlin_24">
  <minmp unit="INHG">         10.0 </minmp>
  <maxmp unit="INHG">         28.5 </maxmp>
  <displacement unit="IN3"> 3078.00 </displacement>
  <maxhp>        1620.00 </maxhp>
  <cycles>         4.0 </cycles>
  <idlerpm>      700.0 </idlerpm>
  <maxrpm>      2800.0 </maxrpm>
  <sparkfaildrop>  0.1 </sparkfaildrop>
  <volumetric-efficiency> 0.85 </volumetric-efficiency>
  <man-press-lag> 0.1 </man-press-lag>
  <static-friction  unit="HP"> 8.10 </static-friction>
  <starter-torque> 1296.00 </starter-torque>
  <starter-rpm> 1400 </starter-rpm>
 <!-- Defining <bsfc> over-rides the built-in horsepower calculations -->
 <!--<bsfc>           0.45 </bsfc>-->
  <stroke unit="IN">  4.375 </stroke>
  <bore unit="IN">    5.125 </bore>
  <cylinders>         34.0  </cylinders>
  <compression-ratio>  8.0 </compression-ratio>
</piston_engine>
